*Heading
** Job name: strength-600 Model name: Model-1
** Generated by: Abaqus/CAE 6.14-1
*Preprint, echo=NO, model=NO, history=NO, contact=NO
**
** PARTS
**
*Part, name="Concrete Beam"
*Node
      1,        -92.5,        -42.5,         100.
      2,        -92.5,        157.5,         100.
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*Element, type=C3D8R
  1,   94,  745, 3625,  705,    1,   33,  633,   58
  2,  745,  746, 3626, 3625,   33,   34,  634,  633
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*Nset, nset=Set-4, generate
    1,  7854,     1
*Elset, elset=Set-4, generate
    1,  6060,     1
*Elset, elset=_Beam-Surf-1_S6, internal, generate
 2281,  2571,    10
*Surface, type=ELEMENT, name=Beam-Surf-1
_Beam-Surf-1_S6, S6
*Elset, elset=_Beam-Surf-2_S6, internal, generate
 301,  591,   10
*Surface, type=ELEMENT, name=Beam-Surf-2
_Beam-Surf-2_S6, S6
*Elset, elset=_Beam-Surf-3_S4, internal, generate
 4090,  4380,    10
*Surface, type=ELEMENT, name=Beam-Surf-3
_Beam-Surf-3_S4, S4
*Elset, elset=_Beam-Surf-4_S6, internal, generate
   1,  291,   10
*Surface, type=ELEMENT, name=Beam-Surf-4
_Beam-Surf-4_S6, S6
** Section: Concerete
*Solid Section, elset=Set-4, controls=EC-1, material=GEO1
,
*End Part
**
*Part, name=Reinforcement-2
*Node
      1,           0.,           0.,        1960.
      2,           0.,         160.,        1960.
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*Element, type=T3D2
1,  2, 65
2, 65, 66
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*Nset, nset=_PickedSet3_#4, internal
   1,  19,  20,  21,  22,  24
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*Elset, elset=_PickedSet3_#4, internal
  67,  68,  69,  72,  73,  74
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*Nset, nset=_PickedSet3_#6, internal
   1,   2,   3,   4,   5,   6
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*Elset, elset=_PickedSet3_#6, internal
   1,   2,   3,   4,   5,   6
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*Nset, nset=_PickedSet3_#5, internal
   2,   3,   4,   5,   6,   7
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*Elset, elset=_PickedSet3_#5, internal
   7,   8,   9,  10,  11,  12
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** Section: Stirrup
*Solid Section, elset=_PickedSet3_#6, material=Steel
28.2743,
** Section: Reinforcement Ten
*Solid Section, elset=_PickedSet3_#5, material=Steel
113.097,
** Section: Rebar Com
*Solid Section, elset=_PickedSet3_#4, material=BFRP
113.1,
*End Part
**
*Part, name="Support Plate"
*Node
      1,         -50.,         -15.,         100.
      2,         -50.,           5.,         100.
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*Element, type=C3D8R
 1, 13, 14, 16, 15,  1,  2,  4,  3
 2, 15, 16, 18, 17,  3,  4,  6,  5
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*Node
     85,          10.,         -15.,          50.
*Nset, nset="Support Plate-RefPt_", internal
85,
*Nset, nset=_PickedSet6, internal, generate
  1,  84,   1
*Elset, elset=_PickedSet6, internal, generate
  1,  30,   1
*Elset, elset=_Plate-Surf-1_S4, internal, generate
  1,  30,   1
*Surface, type=ELEMENT, name=Plate-Surf-1
_Plate-Surf-1_S4, S4
** Section: Support plate
*Solid Section, elset=_PickedSet6, material=Steel
,
*End Part
**
**
** ASSEMBLY
**
*Assembly, name=Assembly
**
*Instance, name="Concrete Beam-1", part="Concrete Beam"
        92.5,         42.5,           0.
*End Instance
**
*Instance, name="Support Plate-1", part="Support Plate"
         50.,          -5.,           0.
*End Instance
**
*Instance, name="Support Plate-1-lin-2-1", part="Support Plate"
         50.,          -5.,        1900.
*End Instance
**
*Instance, name="Support Plate-1-lin-2-1-1", part="Support Plate"
         70.,         205.,         650.
         70.,         205.,         650.,          70.,         205.,         651.,         180.
*End Instance
**
*Instance, name="Support Plate-1-lin-2-1-1-lin-2-1", part="Support Plate"
         70.,         205.,        1250.
         70.,         205.,        1250.,          70.,         205.,        1251.,         180.
*End Instance
**
*Instance, name=Reinforcement-2-1, part=Reinforcement-2
         20.,          20.,          20.
*End Instance
**
*Nset, nset=MIDD, instance="Concrete Beam-1"
 392,
*Nset, nset=Rebar-strain, instance=Reinforcement-2-1
 117, 327, 354
*Nset, nset=Set-8, instance="Support Plate-1"
 85,
*Nset, nset=Set-9, instance="Support Plate-1-lin-2-1"
 85,
*Nset, nset=Set-10, instance="Support Plate-1-lin-2-1-1"
 85,
*Nset, nset=Set-10, instance="Support Plate-1-lin-2-1-1-lin-2-1"
 85,
*Nset, nset=Set-RP, instance="Support Plate-1"
 85,
*Nset, nset=Set-RP, instance="Support Plate-1-lin-2-1"
 85,
*Nset, nset=Set-RP, instance="Support Plate-1-lin-2-1-1-lin-2-1"
 85,
*Nset, nset=Set-RP, instance="Support Plate-1-lin-2-1-1"
 85,
*Nset, nset=m_Set-13, instance=Reinforcement-2-1, generate
   1,  356,    1
*Elset, elset=m_Set-13, instance=Reinforcement-2-1, generate
   1,  416,    1
*Nset, nset=_PickedSet73, internal, instance="Support Plate-1-lin-2-1-1"
 85,
*Nset, nset=_PickedSet75, internal, instance="Support Plate-1-lin-2-1-1-lin-2-1"
 85,
*Nset, nset=_PickedSet77, internal, instance="Support Plate-1"
 85,
*Nset, nset=_PickedSet79, internal, instance="Support Plate-1-lin-2-1"
 85,
*Elset, elset=__PickedSurf72_S6, internal, instance="Support Plate-1-lin-2-1-1", generate
  1,  30,   1
*Surface, type=ELEMENT, name=_PickedSurf72, internal
__PickedSurf72_S6, S6
*Elset, elset=__PickedSurf74_S6, internal, instance="Support Plate-1-lin-2-1-1-lin-2-1", generate
  1,  30,   1
*Surface, type=ELEMENT, name=_PickedSurf74, internal
__PickedSurf74_S6, S6
*Elset, elset=__PickedSurf76_S6, internal, instance="Support Plate-1", generate
  1,  30,   1
*Surface, type=ELEMENT, name=_PickedSurf76, internal
__PickedSurf76_S6, S6
*Elset, elset=__PickedSurf78_S6, internal, instance="Support Plate-1-lin-2-1", generate
  1,  30,   1
*Surface, type=ELEMENT, name=_PickedSurf78, internal
__PickedSurf78_S6, S6
** Constraint: Constraint-1
*Tie, name=Constraint-1, adjust=yes
"Concrete Beam-1".Beam-Surf-1, "Support Plate-1-lin-2-1-1-lin-2-1".Plate-Surf-1
** Constraint: Constraint-2
*Tie, name=Constraint-2, adjust=yes
"Concrete Beam-1".Beam-Surf-2, "Support Plate-1-lin-2-1-1".Plate-Surf-1
** Constraint: Constraint-3
*Tie, name=Constraint-3, adjust=yes
"Concrete Beam-1".Beam-Surf-3, "Support Plate-1-lin-2-1".Plate-Surf-1
** Constraint: Constraint-4
*Tie, name=Constraint-4, adjust=yes
"Concrete Beam-1".Beam-Surf-4, "Support Plate-1".Plate-Surf-1
** Constraint: Constraint-5
*Coupling, constraint name=Constraint-5, ref node=_PickedSet73, surface=_PickedSurf72
*Kinematic
** Constraint: Constraint-6
*Coupling, constraint name=Constraint-6, ref node=_PickedSet75, surface=_PickedSurf74
*Kinematic
** Constraint: Constraint-7
*Coupling, constraint name=Constraint-7, ref node=_PickedSet77, surface=_PickedSurf76
*Kinematic
** Constraint: Constraint-8
*Coupling, constraint name=Constraint-8, ref node=_PickedSet79, surface=_PickedSurf78
*Kinematic
** Constraint: Constraint-10
*Embedded Element
m_Set-13
*End Assembly
**
** ELEMENT CONTROLS
**
*Section Controls, name=EC-1, hourglass=ENHANCED
1., 1., 1.
**
** MATERIALS
**
*Material, name=BFRP
*Density
 2.67e-09,
*Elastic
50000., 0.22
*Plastic
600.,    0.
600., 1e-06
*Material, name=Concrete
*Density
 2.67e-09,
*Elastic
32100., 0.22
*Concrete Damaged Plasticity
38.,     0.1,    1.16, 0.66667,   1e-05
*Concrete Compression Hardening
 15.7978,          0.
 20.4303, 2.43932e-05
 24.4499,  6.7849e-05
 27.7252, 0.000134465
 30.1907, 0.000226279
 31.8515, 0.000343135
 32.7719, 0.000483026
 33.0557, 0.000642721
 31.4542,   0.0010296
 26.3332,   0.0016944
 21.3983,  0.00235315
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 2.49342,   0.0166479
*Concrete Tension Stiffening
  4.52934,          0.
  3.51551, 9.35105e-05
  1.92405, 0.000189532
  1.26253,  0.00025658
  1.02193, 0.000295035
 0.858508, 0.000331084
 0.694178, 0.000382639
 0.584813, 0.000432479
 0.530326, 0.000465131
 0.485875, 0.000497469
 0.432693, 0.000545555
 0.391019, 0.000593279
 0.367898, 0.000624949
 0.347678, 0.000656528
 0.321681, 0.000703759
*Concrete Compression Damage
        0.,          0.
 0.0113673, 2.43932e-05
 0.0260279,  6.7849e-05
 0.0446207, 0.000134465
 0.0673179, 0.000226279
 0.0939925, 0.000343135
  0.124295, 0.000483026
  0.157711, 0.000642721
  0.239671,   0.0010296
  0.382578,   0.0016944
  0.514327,  0.00235315
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  0.984685,   0.0166479
*Concrete Tension Damage
       0.,          0.
 0.434535, 9.35105e-05
  0.73998, 0.000189532
 0.854466,  0.00025658
 0.892941, 0.000295035
 0.917637, 0.000331084
 0.940914, 0.000382639
 0.955287, 0.000432479
 0.962033, 0.000465131
 0.967298, 0.000497469
  0.97328, 0.000545555
 0.977695, 0.000593279
  0.98003, 0.000624949
 0.981999, 0.000656528
 0.984425, 0.000703759
*Material, name=GEO1
*Density
 2.4e-09,
*Elastic
32100., 0.22
*Concrete Damaged Plasticity
42.,    0.1,   1.16, 0.6667,  1e-05
*Concrete Compression Hardening
  18.645,          0.
  22.567, 7.78182e-05
 25.8646, 0.000175091
 28.5376, 0.000291818
 30.5862,    0.000428
 32.0103, 0.000583636
 32.8098, 0.000758727
 32.8753, 0.000956688
 32.3076,  0.00117437
   31.74,  0.00139206
 31.1723,  0.00160974
 30.6046,  0.00182743
 30.0369,  0.00204511
 29.4692,   0.0022628
 28.9015,  0.00248048
   28.05,  0.00280701
*Concrete Tension Stiffening
  3.18632,          0.
  4.94711, 3.51467e-05
  2.89868, 0.000148961
  1.50411, 0.000262405
 0.986714, 0.000348523
*Concrete Compression Damage
        0.,          0.
   0.03214, 7.78182e-05
 0.0612008, 0.000175091
  0.089646, 0.000291818
  0.118752,    0.000428
  0.149357, 0.000583636
  0.182134, 0.000758727
  0.218895, 0.000956688
  0.259285,  0.00117437
   0.29694,  0.00139206
  0.332129,  0.00160974
  0.365086,  0.00182743
  0.396017,  0.00204511
  0.425103,   0.0022628
  0.452504,  0.00248048
  0.490755,  0.00280701
*Concrete Tension Damage
       0.,          0.
 0.022297, 3.51467e-05
 0.141601, 0.000148961
 0.358979, 0.000262405
 0.531358, 0.000348523
*Material, name="Geopolymer Concerete"
*Density
 2.4e-09,
*Elastic
32100., 0.22
*Concrete Damaged Plasticity
38.,     0.1,    1.16, 0.66667,   1e-05
*Concrete Compression Hardening
  18.645,          0.
 20.6841, 3.64773e-05
 24.2939, 0.000124023
 27.2792, 0.000231023
 30.5862,    0.000428
 32.0103, 0.000583636
 32.8098, 0.000758727
 32.9755, 0.000853568
 32.5915,  0.00106553
 32.0238,  0.00128322
 31.1723,  0.00160974
 30.6046,  0.00182743
 30.0369,  0.00204511
 29.1854,  0.00237164
 28.6177,  0.00258932
   28.05,  0.00280701
*Concrete Tension Stiffening
  3.18632,          0.
  4.94711, 3.51467e-05
  2.89868, 0.000148961
  1.50411, 0.000262405
 0.986714, 0.000348523
*Concrete Compression Damage
        0.,          0.
 0.0166993, 3.64773e-05
 0.0468585, 0.000124023
 0.0754052, 0.000231023
  0.118752,    0.000428
  0.149357, 0.000583636
  0.182134, 0.000758727
  0.199534, 0.000853568
   0.23945,  0.00106553
  0.278437,  0.00128322
  0.332129,  0.00160974
  0.365086,  0.00182743
  0.396017,  0.00204511
  0.439005,  0.00237164
  0.465618,  0.00258932
  0.490755,  0.00280701
*Concrete Tension Damage
       0.,          0.
 0.022297, 3.51467e-05
 0.141601, 0.000148961
 0.358979, 0.000262405
 0.531358, 0.000348523
*Material, name=Geot
*Density
 2.4e-09,
*Elastic
32100., 0.22
*Concrete Damaged Plasticity
42.,     0.1,    1.16, 0.66667,   1e-05
*Concrete Compression Hardening
  18.645,          0.
  22.567, 7.78182e-05
 25.8646, 0.000175091
 28.5376, 0.000291818
 30.5862,    0.000428
 32.0103, 0.000583636
 32.8098, 0.000758727
 32.8753, 0.000956688
 32.3076,  0.00117437
   31.74,  0.00139206
 31.1723,  0.00160974
 30.6046,  0.00182743
 30.0369,  0.00204511
 29.4692,   0.0022628
 28.9015,  0.00248048
   28.05,  0.00280701
*Concrete Tension Stiffening
  2.54973,          0.
  4.02114, 2.41618e-05
  2.54953, 0.000120006
   1.7385, 0.000185272
  1.08367, 0.000275672
 0.788077,  0.00035488
*Concrete Compression Damage
        0.,          0.
   0.03214, 7.78182e-05
 0.0612008, 0.000175091
  0.089646, 0.000291818
  0.118752,    0.000428
  0.149357, 0.000583636
  0.182134, 0.000758727
  0.218895, 0.000956688
  0.259285,  0.00117437
   0.29694,  0.00139206
  0.332129,  0.00160974
  0.365086,  0.00182743
  0.396017,  0.00204511
  0.425103,   0.0022628
  0.452504,  0.00248048
  0.490755,  0.00280701
*Concrete Tension Damage
        0.,          0.
 0.0189229, 2.41618e-05
  0.131261, 0.000120006
  0.254893, 0.000185272
  0.449516, 0.000275672
  0.591086,  0.00035488
** ConcreteData
** Calculate By: PolarisCDP plugins
** Source: http://xcbjx.taobao.com
*Material, name="OPC Concrete Plugin"
*Density
 2.45e-09,
*Elastic
36500., 0.2
*Concrete Damaged Plasticity
38.,     0.1,    1.16, 0.66667,   1e-05
*Concrete Compression Hardening
   16.66,         0.
 18.7355,   4.61e-06
 20.8431,  1.196e-05
  22.966,   2.25e-05
 25.0861,  3.674e-05
 27.1834,  5.521e-05
  29.282,  7.908e-05
 31.3891, 0.00010995
 33.4922, 0.00014996
 35.5861, 0.00020288
 37.6641, 0.00027613
 39.7535, 0.00039246
    41.5, 0.00069898
 39.4247, 0.00107224
 37.3417, 0.00129023
 35.2615, 0.00149005
 33.1765,  0.0016864
 31.1011, 0.00188428
  29.021, 0.00208953
  26.943, 0.00230557
 24.8556, 0.00253814
 22.7799, 0.00279027
 20.6956, 0.00307157
 18.6128,  0.0033908
 16.5324,  0.0037624
 14.4495,    0.00421
 12.3711, 0.00476957
 10.2953, 0.00550807
 8.22028, 0.00655934
 6.14492,  0.0082362
*Concrete Tension Stiffening
 2.34493,         0.
 2.49187,    1.9e-06
 2.64005,   4.46e-06
 2.78668,   8.34e-06
    2.93,  2.067e-05
 2.78159,  3.705e-05
 2.63351,  4.854e-05
  2.4851,  5.958e-05
 2.33811,  7.057e-05
 2.19125,  8.192e-05
 2.04454,  9.383e-05
 1.89632, 0.00010672
 1.74966, 0.00012061
 1.60315, 0.00013601
 1.45634,  0.0001535
 1.30921, 0.00017391
 1.16239, 0.00019838
 1.01534, 0.00022901
 0.86878, 0.00026914
 0.72213, 0.00032566
 0.57551, 0.00041319
 0.42894, 0.00056994
*Material, name=Steel
*Density
 7.8e-09,
*Elastic
200000., 0.3
*Plastic
410.,0.
*Material, name=guozhang
*Density
 2.4e-09,
*Elastic
32100., 0.22
*Concrete Damaged Plasticity
38.,     0.1,    1.16, 0.66667,   1e-05
*Concrete Compression Hardening
 21.6506,          0.
 25.7831, 7.11023e-05
 28.9944, 0.000170862
 31.2798, 0.000299425
 32.6347, 0.000456936
 33.0536, 0.000643569
 32.3656, 0.000864643
 30.8016,  0.00111297
 28.8032,  0.00137478
 26.6738,  0.00164064
 24.5913,    0.001905
 22.6455,  0.00216505
 20.8724,  0.00241969
 19.2785,  0.00266871
 17.8552,  0.00291237
 16.5876,  0.00315114
*Concrete Tension Stiffening
     4.99,          0.
  4.39268,  3.3142e-05
  3.30691,  8.6963e-05
  2.50715, 0.000131874
   1.9723, 0.000168531
  1.60849,  0.00019986
  1.35149, 0.000227861
  1.16295, 0.000253729
  1.01994, 0.000278178
 0.908358, 0.000301648
 0.819179, 0.000324419
 0.746444, 0.000346678
*Concrete Compression Damage
        0.,          0.
 0.0258697, 7.11023e-05
 0.0537014, 0.000170862
 0.0844023, 0.000299425
  0.118814, 0.000456936
  0.157895, 0.000643569
  0.204622, 0.000864643
  0.258141,  0.00111297
  0.314901,  0.00137478
  0.371985,  0.00164064
  0.427262,    0.001905
  0.479354,  0.00216505
  0.527496,  0.00241969
  0.571382,  0.00266871
   0.61101,  0.00291237
   0.64657,  0.00315114
*Concrete Tension Damage
        0.,          0.
 0.0236462,  3.3142e-05
 0.0778434,  8.6963e-05
  0.144453, 0.000131874
   0.21525, 0.000168531
  0.285129,  0.00019986
  0.351158, 0.000227861
  0.411886, 0.000253729
  0.466807, 0.000278178
  0.515968, 0.000301648
  0.559715, 0.000324419
  0.598531, 0.000346678
** ConcreteData
** Calculate By: PolarisCDP plugins
** Source: http://xcbjx.taobao.com
*Material, name=guozhang2
*Density
 2.49e-09,
*Elastic
32100., 0.22
*Concrete Damaged Plasticity
38.,     0.1,    1.16, 0.66667,   1e-05
*Concrete Compression Hardening
 13.2256,         0.
 14.9192,  5.944e-05
 16.5842, 0.00012307
 18.2575, 0.00019304
 19.9248,  0.0002698
 21.6093, 0.00035593
 23.2861, 0.00045219
 24.9612, 0.00056171
 26.6247, 0.00068808
 28.2982, 0.00084055
  29.964, 0.00103285
 31.6266, 0.00130776
     33., 0.00193487
 31.3484, 0.00265623
 29.6883, 0.00305444
 28.0306, 0.00341629
  26.374, 0.00377149
 24.7215, 0.00413317
  23.056, 0.00451506
 21.3923, 0.00492329
 19.7318, 0.00536771
 18.0723, 0.00586161
 16.4147, 0.00642145
   14.76,  0.0070703
 13.1039, 0.00784459
 11.4499, 0.00879702
 9.79815,  0.0100167
*Concrete Tension Stiffening
 3.99359,         0.
 4.24383,   1.77e-05
 4.49619,  3.834e-05
 4.74592,  6.456e-05
    4.99, 0.00012696
 4.73805, 0.00016231
 4.48523, 0.00018618
 4.23326, 0.00020853
 3.97733, 0.00023101
 3.71952, 0.00025404
  3.4674, 0.00027739
 3.21164, 0.00030236
 2.95951, 0.00032871
 2.70547, 0.00035763
  2.4533, 0.00038948
 2.20355, 0.00042526
 1.95307, 0.00046707
 1.70317, 0.00051735
 1.45178, 0.00058118
 1.20151, 0.00066648
 0.95172, 0.00079126
 0.70189, 0.00100155
*Concrete Compression Damage
        0.,         0.
  0.024269,  5.944e-05
 0.0678079, 0.00012307
   0.11432, 0.00019304
   0.15878,  0.0002698
   0.20078, 0.00035593
   0.23987, 0.00045219
  0.276844, 0.00056171
  0.312355, 0.00068808
  0.348003, 0.00084055
  0.385256, 0.00103285
  0.428731, 0.00130776
   0.50422, 0.00193487
  0.568452, 0.00265623
  0.598727, 0.00305444
  0.624352, 0.00341629
   0.64798, 0.00377149
  0.670574, 0.00413317
  0.692875, 0.00451506
  0.714997, 0.00492329
  0.737128, 0.00536771
  0.759452, 0.00586161
  0.782066, 0.00642145
  0.805038,  0.0070703
  0.828478, 0.00784459
  0.852354, 0.00879702
  0.876625,  0.0100167
*Concrete Tension Damage
        0.,         0.
 0.0200886,   1.77e-05
 0.0643659,  3.834e-05
  0.122956,  6.456e-05
  0.237652, 0.00012696
  0.280171, 0.00016231
  0.305832, 0.00018618
  0.329724, 0.00020853
   0.35393, 0.00023101
  0.378979, 0.00025404
  0.404563, 0.00027739
  0.431966, 0.00030236
  0.460727, 0.00032871
  0.491785, 0.00035763
  0.525026, 0.00038948
  0.560701, 0.00042526
  0.599667, 0.00046707
  0.642223, 0.00051735
  0.689306, 0.00058118
  0.741026, 0.00066648
  0.797939, 0.00079126
  0.860031, 0.00100155
**
** BOUNDARY CONDITIONS
**
** Name: BC-fix1 Type: Displacement/Rotation
*Boundary
Set-8, 1, 1
Set-8, 2, 2
Set-8, 3, 3
Set-8, 5, 5
Set-8, 6, 6
** Name: BC-fix2 Type: Displacement/Rotation
*Boundary
Set-9, 1, 1
Set-9, 2, 2
Set-9, 5, 5
Set-9, 6, 6
** ----------------------------------------------------------------
**
** STEP: Step-1
**
*Step, name=Step-1, nlgeom=YES, inc=10000, unsymm=YES
*Static
0.01, 1., 1e-08, 1.
**
** BOUNDARY CONDITIONS
**
** Name: BC-load Type: Displacement/Rotation
*Boundary
Set-10, 1, 1
Set-10, 2, 2, -50.
Set-10, 5, 5
Set-10, 6, 6
**
** CONTROLS
**
*Controls, reset
*Controls, analysis=discontinuous
*Controls, parameters=time incrementation
, , , , , , , 15, , ,
**
** OUTPUT REQUESTS
**
*Restart, write, frequency=0
**
** FIELD OUTPUT: F-Output-1
**
*Output, field
*Node Output
U,
*Element Output, directions=YES
DAMAGEC, DAMAGET, E, LE, NE, PE, PEEQ, PEMAG, S, SDEG
**
** HISTORY OUTPUT: Mid displacement
**
*Output, history
*Node Output, nset=MIDD
U2,
**
** HISTORY OUTPUT: Reaction
**
*Node Output, nset=Set-RP
RF2,
**
** HISTORY OUTPUT: H-Output-1
**
*Output, history, variable=PRESELECT
*End Step
